# BC337-40
U_m_in := 3.5
I_k0 := 10*10^-9
I_k_rt := 1.422*10^-3
f_min := 20
U_be_rt := 4.5
β := 500
r_in := 2
U_ke_nas := 0.7
r_out := 4
U_be_max := 5
E := 14.8
k := 0.1/100 = 0.001
φ_T := 25*10^-3
# Расчёт:
I_e*R_e ≤ E - U_m_in - U_ke_nas → I_e*R_e ≤ 10.6
I_e*R_e > U_m_in → I_e*R_e > 3.5
I_e := I_k_rt = 0.001422
R_e + R_1/β ≤ (E - U_be_max)/I_e → R_1/500 + R_e ≤ 6891.70182841
R_1(R_e) := ((E - U_be_max)/I_e - R_e)*β
R_e := 2.7*10^3
R_1(R_e) = 2095851
R_1 := 2*10^6
R_1/β + R_e = 6700
r_in_k(R_e) := R_1*β*R_e/(R_1 + β*R_e)
r_in_k(R_e) = 805970
r_out_k := φ_T/I_e = 17.5809
