# BC337-40
I_k0 := 10*10^-9
I_k_rt := 3.496*10^-3
f_min := 20
U_be_rt := 1.45
β := 500
r_in := 2
U_ke_nas := 0.7
r_out := 10*10^3
E := 14.8
# Расчёт:
R_e := 220  # - R эмиттера
I_k_rt*R_e = 0.76912
I_k_rt*R_e ≥ 0.5 → 1
U_b := I_k_rt*R_e + U_be_rt = 2.21912  # - расчётный потенциал БАЗЫ
I_b := I_k_rt/β = 6.992e-6  # - максимальный ток БАЗЫ
R_b := E/I_b = 2116705
R_b := 2.2*10^6
I_b := E/R_b = 6.72727e-6
# Оценим входное сопротивление каскадов:
r_in_k := R_b*β*R_e/(R_b + β*R_e) = 104762
E - 0.3 - U_ke_nas = 13.8
R_k_max := (E - 0.3 - U_ke_nas)*R_e/(I_k_rt*R_e) = 3947.37
R_k := 2*10^3  # - резистор Rk
C_1 := 1/(2*π*f_min*(r_in + r_in_k)) = 7.59589e-8
C_1 := 4.7*10^-6  # - входной конденсатор
# Примерное усиление по напряжению:
r_out := 10^4
K_u := r_in_k/(r_in + r_in_k)*r_out/(r_out + R_k)*R_k/R_e = 7.57561
0.2*K_u = 1.51512
