# BC337-40
I_k0 := 10*10^-9
I_k_rt := 3.496*10^-3
f_min := 20
U_be_rt := 1.45
β := 500
r_in := 2
U_ke_nas := 0.7
r_out := 4
E := 14.8
# Расчёт:
R_e := 220  # - R эмиттера
I_k_rt*R_e = 0.76912
I_k_rt*R_e ≥ 0.5 → 1
U_b := I_k_rt*R_e + U_be_rt = 2.21912  # - расчётный потенциал БАЗЫ
I_b := I_k_rt/β = 6.992e-6  # - максимальный ток БАЗЫ
# Выбираем ток через делитель много больше тока базы
I_del := I_b = 6.992e-6
R_2 := U_b/I_del = 317380
R_2 := 3*10^5  # - резистор R2
R_1 := E/I_del - R_2 = 1816705
R_1 := 1.8*10^6 = 1800000  # - резистор R1
# Перерасчёт потенциала базы:
U_b = 2.21912
U_b := E*R_2/(R_1 + R_2) = 2.11429  # - потенциал БАЗЫ
# Оценим входное сопротивление каскадов:
r_in_k := R_1*R_2*β*R_e/(R_1*R_2 + R_1*β*R_e + R_2*β*R_e) = 77042.8
# Примем равное R2:
r_in_k := R_2 = 300000
E - 0.3 - U_ke_nas = 13.8
R_k_max := (E - 0.3 - U_ke_nas)*R_e/(I_k_rt*R_e) = 3947.37
R_k := 2*10^3  # - резистор Rk
C_1 := 1/(2*π*f_min*(r_in + r_in_k)) = 2.65256e-8
C_1 := 4.7*10^-6  # - входной конденсатор
r_out := 10^4
K_u := r_in_k/(r_in + r_in_k)*r_out/(r_out + R_k)*R_k/R_e = 7.57571
0.5*K_u = 3.78785
r_out := 4
K_u_2_out4 := r_in_k/(r_in + r_in_k)*r_out/(r_out + 7.151)*R_k/R_e*4.914*10^4/(R_k + 4.914*10^4) → 3.13346626564
r_out := 10^4
K_u_2_out10_4 := r_in_k/(r_in + r_in_k)*r_out/(r_out + 17.581)*R_k/R_e*8.06*10^5/(R_k + 8.06*10^5) → 9.05243130556
0.5*K_u_2_out4 = 1.56673
0.5*K_u_2_out10_4 = 4.52622
