U_m_in := 0.7  # BC337-40
I_k0 := 100*10^-9
I_k_rt := 3.9*10^-3
f_min := 20
U_be_rt := 682.336*10^-3
β := 500
r_in := 2
U_ke_nas := 0.7
r_out := 4
U_be_max := 5
E := 14.8
k := 0.1/100 = 0.001
φ_T := 25*10^-3
# Расчёт:
I_e*R_e ≥ φ_T*(sqrt(U_m_in/(4*φ_T*k)) - 1) → I_e*R_e ≥ 2.06665006634
I_e*R_e ≤ E - U_m_in - U_ke_nas → I_e*R_e ≤ 13.4
I_e*R_e > U_m_in → I_e*R_e > 0.7
I_e := I_k_rt = 0.0039
R_e + R_1/β ≤ (E - U_be_max)/I_e → R_1/500 + R_e ≤ 2512.82051282
R_1(R_e) := ((E - U_be_max)/I_e - R_e)*β
r_in_k(R_e) := R_1(R_e)*β*R_e/(R_1(R_e) + β*R_e) → -7.95918367347e-7*R_e*(250000*R_e - 628205128.205)
r_in_k_d(R_e) := d/dR_e(r_in_k(R_e)) → -0.397959183673*R_e + 500.0
r_in_k_d(R_e) solve, R_e → 1256.41025641
R_e := 510
R_1(R_e) = 1001410
R_1 := 0.51*10^6
R_1/500 + R_e = 1530
r_in_kk(R_e) := R_1*β*R_e/(R_1 + β*R_e)
r_in_kk(R_e) = 170000
3.135*10^5
r_out_k := φ_T/I_e = 6.41026
6.41
