# BC337-40
I_k0 := 100*10^-9
I_k_rt := 3.9*10^-3
f_min := 20
U_be_rt := 682.336*10^-3
β := 500
r_in := 2
U_ke_nas := 0.7
r_out := 4
E := 14.8
# Расчёт:
R_e := 220  # - Rэ
I_k_rt*R_e = 0.858
I_k_rt*R_e ≥ 0.5 → 1
U_b := I_k_rt*R_e + U_be_rt = 1.54034  # - расчётный потенциал БАЗЫ
I_b := I_k_rt/β = 7.8e-6  # - максимальный ток БАЗЫ
# Выбираем ток через делитель много больше тока базы
I_del := I_b*30 = 0.000234
R_2 := U_b/I_del = 6582.63
R_2 := 6.5*10^3  # - резистор R2
R_1 := E/I_del - R_2 = 56747.9
R_1 := 56*10^3 = 56000  # - резистор R1
# Перерасчёт потенциала базы:
U_b = 1.54034
U_b := E*R_2/(R_1 + R_2) = 1.5392  # - потенциал БАЗЫ
# Оценим входное сопротивление каскадов:
r_in_k := R_1*R_2*β*R_e/(R_1*R_2 + R_1*β*R_e + R_2*β*R_e) = 5531.15
# Примем равное R2:
r_in_k := R_2 = 6500
E - 0.3 - U_ke_nas = 13.8
R_k_max := (E - 0.3 - U_ke_nas)*R_e/(I_k_rt*R_e) = 3538.46
R_k := 3.3*10^3  # - резистор Rk
C_1 := 1/(2*π*f_min*(r_in + r_in_k)) = 1.22389e-6
C_1 := 4.7*10^-6  # - входной конденсатор
r_out := 10^4
K_u := R_2/(r_in + R_2)*r_out/(r_out + R_k)*R_k/R_e = 11.2747
K_u_2 := R_2/(r_in + R_2)*r_out/(r_out + R_k)*(R_k/R_e)^2*R_2/(R_k + R_2) = 112.172
1*10^-3*K_u = 0.0112747
1*10^-3*K_u_2 = 0.112172
K_u_3 := 3.135*10^5/(r_in + 3.135*10^5)*r_out/(r_out + R_k)*(R_k/R_e)^2*R_2/(6.41 + R_2)*R_2/(R_k + R_2) = 112.095
1*10^-3*K_u_3 = 0.112095
