# BC337-40
I_k0 := 100*10^-9
I_k_rt := 3.9*10^-3
f_min := 20
U_be_rt := 682.336*10^-3
β := 500
r_in := 2
U_ke_nas := 0.7
r_out := 10*10^3
E := 14.8
# Расчёт:
R_e := 1000  # - Rэ
I_k_rt*R_e = 3.9
I_k_rt*R_e ≥ 0.5 → 1
U_b := I_k_rt*R_e + U_be_rt = 4.58234  # - расчётный потенциал БАЗЫ
I_b := I_k_rt/β = 7.8e-6  # - максимальный ток БАЗЫ
# Выбираем ток через делитель много больше тока базы
I_del := I_b*30 = 0.000234
R_2 := U_b/I_del = 19582.6
R_2 := 20*10^3  # - резистор R2
R_1 := E/I_del - R_2 = 43247.9
R_1 := 43*10^3 = 43000  # - резистор R1
# Перерасчёт потенциала базы:
U_b = 4.58234
U_b := E*R_2/(R_1 + R_2) = 4.69841  # - потенциал БАЗЫ
# Оценим входное сопротивление каскадов:
r_in_k := R_1*R_2*β*R_e/(R_1*R_2 + R_1*β*R_e + R_2*β*R_e) = 13288
# Примем равное R2:
r_in_k := R_2 = 20000
E - 0.3 - U_ke_nas = 13.8
R_k_max := (E - 0.3 - U_ke_nas)*R_e/(I_k_rt*R_e) = 3538.46
R_k := 1*10^3  # - резистор Rk
C_1 := 1/(2*π*f_min*(r_in + r_in_k)) = 3.97848e-7
C_1 := 4.7*10^-6  # - входной конденсатор
r_out := 10^4
K_u := R_2/(r_in + R_2)*r_out/(r_out + R_k)*R_k/R_e = 0.909
K_u_2 := R_2/(r_in + R_2)*r_out/(r_out + R_k)*(R_k/R_e)^2*R_2/(R_k + R_2) = 0.865714
1*10^-3*K_u = 0.000909
1*10^-3*K_u_2 = 0.000865714
K_u_3 := 1.7*10^5/(r_in + 1.7*10^5)*r_out/(r_out + R_k)*(R_k/R_e)^2*R_2/(6.41 + R_2)*R_2/(R_k + R_2) = 0.865513
1*10^-3*K_u_3 = 0.000865513
K_u_4 := 1.7*10^5/(r_in + 1.7*10^5)*r_out/(r_out + 6.41)*(R_k/R_e)^2*R_2/(6.41 + R_2)*R_2/(R_k + R_2)*1.7*10^5/(R_k + 1.7*10^5) = 0.945891
63*10^-6/(31*10^-9) = 2032.26
1*10^-3*K_u_4 = 0.000945891
