f_min := 20  # МП35
I_k0 := 30*10^-6
r_in := 2
I_k_rt := 4.24*10^-3
r_out := 4
U_be_rt := 195*10^-3
E := 7.5
β := 44
U_ke_nas := 0.25
# Расчёт:
R_e := 220  # - R эмиттера
I_k_rt*R_e = 0.9328
I_k_rt*R_e ≥ 0.5 → 1
U_b := I_k_rt*R_e + U_be_rt = 1.1278  # - расчётный потенциал БАЗЫ
I_b := I_k_rt/β = 9.63636e-5  # - максимальный ток БАЗЫ
# Выбираем ток через делитель много больше тока базы
I_del := I_b*20 = 0.00192727
R_2 := U_b/I_del = 585.179
R_2 := 560  # - резистор R2
R_1 := E/I_del - R_2 = 3331.51
R_1 := 3.3*10^3 = 3300  # - резистор R1
# Перерасчёт потенциала базы:
U_b = 1.1278
U_b := E*R_2/(R_1 + R_2) = 1.08808  # - потенциал БАЗЫ
# Оценим входное сопротивление каскадов:
r_in_k := R_1*R_2*β*R_e/(R_1*R_2 + R_1*β*R_e + R_2*β*R_e) = 456.194
# Примем равное R2:
r_in_k := R_2 = 560
E - 0.3 - U_ke_nas = 6.95
R_k_max := (E - 0.3 - U_ke_nas)*R_e/(I_k_rt*R_e) = 1639.15
R_k := 1*10^3  # - резистор Rk
C_1 := 1/(2*π*f_min*(r_in + r_in_k)) = 1.41597e-5
C_1 := 4.7*10^-6  # - входной конденсатор
r_out := 10^4
K_u := R_2/(r_in + R_2)*r_out/(r_out + R_k)*R_k/R_e = 4.11753
1*10^-3*K_u = 0.00411753
